suffix		omp
units		si
package		omp 1

##############################################################################
#variables
##############################################################################
variable	pi equal 3.1415927

include		{{variable_filename}}

variable	skin equal ${r_pebble}/12

variable	d_pebble equal 2*${r_pebble}
variable	mass equal ${density_rho}*(4/3)*${pi}*(${r_pebble}^3)
variable	shear_mod_G equal ${young_mod_E}/(2*(1+${poisson}))
variable	k_n equal (4*${shear_mod_G})/(3*(1-${poisson}))
variable	k_t equal (4*${shear_mod_G})/(2-${poisson})
variable	numerator equal (2*${k_n})/${mass}
variable	denominator equal (${pi}/(-2*log(${co_rest})))^2+0.25
variable	gamma_n equal sqrt(${numerator}/${denominator})
variable	gamma_t equal 0.5*${gamma_n}

variable	t_col equal ${pi}/sqrt(2*(${k_n}/${mass})-(${gamma_n}^2)/4)
variable	dt equal ${t_col}/50

##############################################################################
#simulation parameters
##############################################################################
newton		on
atom_style	sphere

boundary	f f f
region		bounds block &
		{{x_b.low}} {{x_b.up}} {{y_b.low}} {{y_b.up}} {{z_b.low}} {{z_b.up}}
create_box	6 bounds

fix		track_passes all property/atom i_pass
fix		times_recirc all property/atom i_recirc
fix		orig_zone all property/atom i_zone
fix		orig_layer all property/atom i_layer

pair_style	gran/hertz/history/omp &
		${k_n} ${k_t} ${gamma_n} ${gamma_t} ${co_fric} 1
pair_coeff	* *

neighbor	${skin} multi
neigh_modify	delay 0 every 50 check yes
thermo		${interval}
timestep	${dt}

comm_style	brick
comm_modify	mode multi group all vel yes
balance		1.1 shift xyz 20 1.1
fix		bal all balance ${interval} 1.1 shift xyz 20 1.01

##############################################################################
#geometry
##############################################################################


{% for filename in region_files -%}
include		{{filename}}
{% endfor -%}

region		whole_core union {{n_regions}} &
{%+ 		for name in region_names[0:-1] %}
                {{name}} &
{% endfor %}
		{{region_names[-1]}}

fix		grav all gravity ${gravity} vector 0 0 1
fix		nve_int all nve/sphere
fix		wall_gran all wall/gran/region hertz/history &
		${k_n} ${k_t} ${gamma_n} ${gamma_t} ${co_fric} 1 &
		region whole_core

variable	dump_freq equal 200000

include		{{v_reg_fname}}
group		2wallgroup dynamic all region 2wall
group		5wallgroup dynamic all region 5wall
group		8wallgroup dynamic all region 8wall
group		12wallgroup dynamic all region 12wall
group		16wallgroup dynamic all region 16wall
group		20wallgroup dynamic all region 20wall

dump		2walldump 2wallgroup custom ${dump_freq} velocity/2wall/step_*.bin id z vx vy vz
dump_modify	2walldump pad 15
dump		5walldump 5wallgroup custom ${dump_freq} velocity/5wall/step_*.bin id z vx vy vz
dump_modify	5walldump pad 15
dump		8walldump 8wallgroup custom ${dump_freq} velocity/8wall/step_*.bin id z vx vy vz
dump_modify	8walldump pad 15
dump		12walldump 12wallgroup custom ${dump_freq} velocity/12wall/step_*.bin id z vx vy vz
dump_modify	12walldump pad 15
dump		16walldump 16wallgroup custom ${dump_freq} velocity/16wall/step_*.bin id z vx vy vz
dump_modify	16walldump pad 15
dump		20walldump 20wallgroup custom ${dump_freq} velocity/center/step_*.bin id z vx vy vz
dump_modify	20walldump pad 15


dump		peb_coords all custom ${dump_freq} coords/step_*.bin id type i_pass x y z
dump_modify	peb_coords pad 15


thermo_style	custom step cpu tpcpu spcpu cpuremain time atoms ke
thermo_modify	flush yes lost warn

##############################################################################
#filling core
##############################################################################

read_dump	{{starting_bed}} 0 x y z add yes timestep no

set		type * diameter ${d_pebble}
set		type * i_recirc 0

set		type 1 type/subset 2 6666 436651
set		type 1 type/subset 3 6666 435345
set		type 1 type/subset 4 6666 354354
set		type 1 type/subset 5 6666 468545
set		type 1 type/subset 6 6666 435346

set		type 1 i_pass 0
set		type 2 i_pass 1
set		type 3 i_pass 2
set		type 4 i_pass 3
set		type 5 i_pass 4
set		type 6 i_pass 5

set		type * type 1

group		2wallcolor region 2wall
set		group 2wallcolor i_zone 6
group		2wallcolor delete

group		5wallcolor region 5wall
set		group 5wallcolor i_zone 5
group		5wallcolor delete

group		8wallcolor region 8wall
set		group 8wallcolor i_zone 4
group		8wallcolor delete

group		12wallcolor region 12wall
set		group 12wallcolor i_zone 3
group		12wallcolor delete

group		16wallcolor region 16wall
set		group 16wallcolor i_zone 2
group		16wallcolor delete

group		20wallcolor region center
set		group 20wallcolor i_zone 1
group		20wallcolor delete

variable	layer_t equal ({{vessel_zmax}}-({{vessel_zmin}}))/10

region		layer1reg cylinder z {{x_c}} {{y_c}} {{r_vessel}} &
		{{zmax_vessel}}-v_layer_t {{zmax_vessel}} side in units box
region		layer2reg cylinder z {{x_c}} {{y_c}} {{r_vessel}} &
		{{zmax_vessel}}-2*v_layer_t {{zmax_vessel}}-v_layer_t  side in units box
region		layer3reg cylinder z {{x_c}} {{y_c}} {{r_vessel}} &
		{{zmax_vessel}}-3*v_layer_t {{zmax_vessel}}-2*v_layer_t side in units box
region		layer4reg cylinder z {{x_c}} {{y_c}} {{r_vessel}} &
		{{zmax_vessel}}-4*v_layer_t {{zmax_vessel}}-3*v_layer_t side in units box
region		layer5reg cylinder z {{x_c}} {{y_c}} {{r_vessel}} &
		{{zmax_vessel}}-5*v_layer_t {{zmax_vessel}}-4*v_layer_t side in units box
region		layer6reg cylinder z {{x_c}} {{y_c}} {{r_vessel}} &
		{{zmax_vessel}}-6*v_layer_t {{zmax_vessel}}-5*v_layer_t side in units box
region		layer7reg cylinder z {{x_c}} {{y_c}} {{r_vessel}} &
		{{zmax_vessel}}-7*v_layer_t {{zmax_vessel}}-6*v_layer_t side in units box
region		layer8reg cylinder z {{x_c}} {{y_c}} {{r_vessel}} &
		{{zmax_vessel}}-8*v_layer_t {{zmax_vessel}}-7*v_layer_t side in units box
region		layer9reg cylinder z {{x_c}} {{y_c}} {{r_vessel}} &
		{{zmax_vessel}}-9*v_layer_t {{zmax_vessel}}-8*v_layer_t side in units box
region		layer10reg cylinder z {{x_c}} {{y_c}} {{r_vessel}} &
		{{zmin_vessel}} {{zmax_vessel}}-9*v_layer_t side in units box

group		layer1 region layer1reg
group		layer2 region layer2reg
group		layer3 region layer3reg
group		layer4 region layer4reg
group		layer5 region layer5reg
group		layer6 region layer6reg
group		layer7 region layer7reg
group		layer8 region layer8reg
group		layer9 region layer9reg
group		layer10 region layer10reg

set		group layer1 i_layer 1
set		group layer2 i_layer 2
set		group layer3 i_layer 3
set		group layer4 i_layer 4
set		group layer5 i_layer 5
set		group layer6 i_layer 6
set		group layer7 i_layer 7
set		group layer8 i_layer 8
set		group layer9 i_layer 9
set		group layer10 i_layer 10

group		layer1 delete
group		layer2 delete
group		layer3 delete
group		layer4 delete
group		layer5 delete
group		layer6 delete
group		layer7 delete
group		layer8 delete
group		layer9 delete
group		layer10 delete

include		{{outlet_fname}}

variable	recirculated equal 0
variable	recirc_run equal 2500000


########## Start Mainloop ##########
label		recirculate

variable	displace equal (({{z_b.low}}+3*${d_pebble}) - bound(all, zmax))
group		outlet region recirc_outlet
variable	next_pass atom (i_pass<5)*round(i_pass+1)
set		group outlet i_pass v_next_pass
variable	next_recirc atom round(i_recirc+1)
set		group outlet i_recirc v_next_recirc
dump		recirc_ids outlet custom 1 recirc/step_*.bin id
dump_modify	recirc_ids pad 15
run		0
undump		recirc_ids
displace_atoms	outlet move 0.0 0.0 ${displace} units box
compute		n outlet count/type atom
run		0
variable	N equal c_n[1]

run 		${recirc_run}

variable	recirculated equal ${recirculated}+${N}
variable	displace delete
variable	N delete
uncompute	n
group		outlet delete

if		"${recirculated} >= ${recirc_target}" then "jump SELF break"
jump		SELF recirculate

label		break
